# Задание 1.
x := 2
n := 10
y := (sqrt(x^3 + n) + cos(|n*x - 1|)^2)/(nthroot(x^5 + 8*x + n, 4)*cos((x + n)*π/4))
y = -1.8916
# Задание 2.
x := 7
y := 10
z := -3
p := if(x > y, sin(x) + 3*|y| - z^2, (y + 3)*ln(|x + 1|)/sqrt(z^2 + 1))
p = 8.5485
q := if(x > y or x < 1, cos(x) + 2*|y + 1| - z, (x*y + 3)/sqrt(y^2 + 5))
q = 7.12407
w := if(x < y and y ≥ 10, x^2 + 2*(y*x + 1) - z, (x^-3*y^2 + 3)*sqrt(z^2 + 7))
w = 194
# Задание 3.
f(x) := (x^2 - n*x + sin(x))*sqrt(|x - cos(n*x)|)
x1 := -2
x2 := 2
Δx := 0.4
x := x1, x1 + Δx .. x2
f(x) = [35.8321; 14.074; 17.8818; 6.40951; 1.89898; 0; -3.54192; -6.4591; -5.74577; -19.8956; -19.0401]
# Задание 4.
a := -3*n
b := 3*n
A := runif(3, a, b) = [-29.9239; -18.4006; 5.10037]
B := runif(3, a, b) = [-8.98151; 19.3703; -19.5523]
C := runif(3, a, b) = [12.6297; -11.7608; -24.5153]
Шаблоны
s := A*B
V := B×C
w := (A×B)*C
s = -187.387
w = 28977.3
V = [-704.819; -467.124; -139.011]
# Без шаблонов
s := A[0]*B[0] + A[1]*B[1] + A[2]*B[2] = -187.387
V := [B[1]*C[2] - B[2]*C[1]; B[2]*C[0] - B[0]*C[2]; B[0]*C[1] - B[1]*C[0]] = [-704.819; -467.124; -139.011]
w := (A[1]*B[2] - A[2]*B[1])*C[0] + (A[2]*B[0] - A[0]*B[2])*C[1] + (A[0]*B[1] - A[1]*B[0])*C[2] = 28977.3
|A| = 35.497
|B| = 28.9511
|C| = 29.9805
Alength := sqrt(A[0]^2 + A[1]^2 + A[2]^2) = 35.497
Max := max(|A|, |B|, |C|) = 35.497  # Это A
str := if(Max == |A|, "Это А", if(Max == |B|, "Это B", if(Max == |C|, "Это C", "")))
N := 10  # задание последнего элемента
str = "Это А"
M[N, N] := 15
M = [
    0, 0, 0, 0, 0, 0, 0, 0, 0, 0, 0;
    0, 0, 0, 0, 0, 0, 0, 0, 0, 0, 0;
    0, 0, 0, 0, 0, 0, 0, 0, 0, 0, 0;
    0, 0, 0, 0, 0, 0, 0, 0, 0, 0, 0;
    0, 0, 0, 0, 0, 0, 0, 0, 0, 0, 0;
    0, 0, 0, 0, 0, 0, 0, 0, 0, 0, 0;
    0, 0, 0, 0, 0, 0, 0, 0, 0, 0, 0;
    0, 0, 0, 0, 0, 0, 0, 0, 0, 0, 0;
    0, 0, 0, 0, 0, 0, 0, 0, 0, 0, 0;
    0, 0, 0, 0, 0, 0, 0, 0, 0, 0, 0;
    0, 0, 0, 0, 0, 0, 0, 0, 0, 0, 15
]
i := 0, 1 .. N - 1
j := 0, 1 .. N - 1
M[i, j] := -10 + floor(rnd(20))  # рандомная генерация элементов
M = [
    -8, 9, -8, -10, 0, 2, -7, -1, -9, 5, 0;
    0, 7, 9, 0, -1, 7, 5, 9, 2, -5, 0;
    6, -3, 3, -10, -5, 1, 6, -1, 4, -1, 0;
    4, 1, 4, 1, -7, -2, 0, 5, -7, -1, 0;
    3, -8, -8, 3, -2, 9, -7, 6, -7, 6, 0;
    -7, 4, -5, 3, 4, -8, 6, 0, -2, 8, 0;
    0, -1, 6, -1, 9, 4, -7, 6, 0, -10, 0;
    1, 0, 6, 3, 6, -8, -4, -5, -8, 6, 0;
    2, -5, -10, 6, -6, 1, -8, 5, 0, -2, 0;
    3, -2, 1, 2, 0, 3, -7, -7, -1, -9, 0;
    0, 0, 0, 0, 0, 0, 0, 0, 0, 0, 15
]
Mv[i] := sum(M[:, i])  # Сумма всех элементов матрицы
sum := sum(Mv) = -29
pM[i, j] := M[i, j]*(M[i, j] > 0)
pM = [
    0, 9, 0, 0, 0, 2, 0, 0, 0, 5;
    0, 7, 9, 0, 0, 7, 5, 9, 2, 0;
    6, 0, 3, 0, 0, 1, 6, 0, 4, 0;
    4, 1, 4, 1, 0, 0, 0, 5, 0, 0;
    3, 0, 0, 3, 0, 9, 0, 6, 0, 6;
    0, 4, 0, 3, 4, 0, 6, 0, 0, 8;
    0, 0, 6, 0, 9, 4, 0, 6, 0, 0;
    1, 0, 6, 3, 6, 0, 0, 0, 0, 6;
    2, 0, 0, 6, 0, 1, 0, 5, 0, 0;
    3, 0, 1, 2, 0, 3, 0, 0, 0, 0
]
pMv[i] := sum(pM[:, i])
# Сумма положительных элементов
psum := sum(pMv) = 212
pM[i, j] := M[i, j]*(M[i, j] < 0)
pM = [
    -8, 0, -8, -10, 0, 0, -7, -1, -9, 0;
    0, 0, 0, 0, -1, 0, 0, 0, 0, -5;
    0, -3, 0, -10, -5, 0, 0, -1, 0, -1;
    0, 0, 0, 0, -7, -2, 0, 0, -7, -1;
    0, -8, -8, 0, -2, 0, -7, 0, -7, 0;
    -7, 0, -5, 0, 0, -8, 0, 0, -2, 0;
    0, -1, 0, -1, 0, 0, -7, 0, 0, -10;
    0, 0, 0, 0, 0, -8, -4, -5, -8, 0;
    0, -5, -10, 0, -6, 0, -8, 0, 0, -2;
    0, -2, 0, 0, 0, 0, -7, -7, -1, -9
]
oMv[i] := sum(pM[:, i])
# Сумма отрицательных элементов
osum := sum(oMv) = -241
Y := transpose(M)[:, 9]
Y = [3; -2; 1; 2; 0; 3; -7; -7; -1; -9; 0]
X := M[:, 0] = [-8; 0; 6; 4; 3; -7; 0; 1; 2; 3; 0]
g := transpose(X)*Y
g = -67
# Задание 5.
y(x11) := exp(-(|x11|/3))*cos(x11)
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# Задание 6.
f(x) := if(x < 0, e^x*x^3, e^(-x)*x^3)
x := -9, -8.75 .. 9
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# Задание 7.
g(x) := sqrt(|x|)*sin(x)
x := -2*π, -1.75*π .. 2*π
Y := g(X)
WRITEPRN("Xvalue.txt") := X
WRITEPRN("Yvalue.txt") := Y
XX := READPRN("Xvalue.txt")
YY := READPRN("Yvalue.txt")
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# Задание 8.
q(x) := exp(-x^2)
x := -3, -2.99 .. 3
p(x) := d/dx(q(x))
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# Задание 9.
f(x, y) := sin(sqrt(x^2 + y^2))/sqrt(x^2 + y^2)
# [component: inputs f]
# Задание 10.
x := -5, -4.99 .. 5
f(x) := x^2 + (x - 2)*sin(x) - 5
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x := -2
x1 := root(f(x), x)
x1 = -1.32936
f(x1) = 1.1382e-11
x := 2
x1 := root(f(x), x)
f(x1) = 3.52607e-13
# Задание 11.
x := -4, -3.99 .. 4
f(x) := x^2 + x*sin(2*x) - (x - 5)*cos(x)
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x2 := root(f(x), x, -2, -1) = -1.93283
f(x2) = 0
x2 := root(f(x), x, -3, -2) = -2.97354
f(x2) = -1.77636e-15
# Задание 12.
n := 10
V := [-3*n; 3 - 4*n; 4 - n; 1]
r := polyroots(V) = [-3; -1; 10]
# Задание 13.
n := 10
A := [n, n + 1, n + 2; n - 3, n - 2, n; n - 1, n, n + 1] = [10, 11, 12; 7, 8, 10; 9, 10, 11]
B := [6*n + 8; 6*n - 7; 6*n + 2] = [68; 53; 62]  # Матричный метод
X := A^-1*B = [1; 2; 3]
A*X = [68; 53; 62]
x := X[0] = 1
y := X[1] = 2
z := X[2] = 3
x := 0
y := 0
z := 0  # С помощью Given ... Find
Given
n*x + (n + 1)*y + (n + 2)*z == 6*n + 8
(n - 3)*x + (n - 2)*y + n*z == 6*n - 7
(n - 1)*x + n*y + (n + 1)*z == 6*n + 2
A := Find(x, y, z) = [1; 2; 3]
x := A[0]
y := A[1]
z := A[2]
n*x + (n + 1)*y + (n + 2)*z = 68
6*n + 8 = 68
(n - 3)*x + (n - 2)*y + n*z = 53
6*n - 7 = 53
(n - 1)*x + n*y + (n + 1)*z = 62
6*n + 2 = 62
# Задание 14.
y1(x) := sqrt(1 - x^2/81)*4
y2(x) := sqrt(1 - x^2/81)*(-4)
y3(x) := sqrt(25 - (x - 9)^2) + 2
y4(x) := -sqrt(25 - (x - 9)^2) + 2
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Given
x := 4
x^2/81 + y^2/16 == 1
y := 4
(x - 9)^2 + (y - 2)^2 == 25
Find(x, y) = [4.23934; 3.52845]
Given
x := 7
y := -3
x^2/81 + y^2/16 == 1
(x - 9)^2 + (y - 2)^2 == 25
Find(x, y) = [6.9308; -2.55175]
# Задание 15.
f(x) := x*sin(x)
x := 0, 0.001 .. 10
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x := 5
x_min := Minimize(f, x) = 4.91318
y_min := f(x_min) = -4.81447
x := 2
x1_max := Maximize(f, x) = 2.02876
y1_max := f(x1_max) = 1.81971
x := 8
x2_max := Maximize(f, x) = 7.97867
y2_max := f(x2_max) = 7.91673
