# Задание 1
# Координаты вершин:
Xa := -2
Ya := -4
Xb := -3
Yb := 0
Xc := 0
Yc := 4
Xd := 3
Yd := 0
Xe := 2
Ye := -4
Xf := -2
Yf := 0
Xh := 2
Yh := 0
# Координаты окна Windows:
# Координаты левого верхнего угла области
Xlw := 100
Ylw := 200
# Координаты правого нижнего угла области
Xhw := 400
Yhw := 500
# Создание матриц координат вершин
Zx := [Xa, Xb, Xc, Xd, Xe, Xf, Xh]
Zy := [Ya, Yb, Yc, Yd, Ye, Yf, Yh]
# Определение координат прямоугольной области в мировых координатах по габаритам фигуры
# координаты левого верхнего угла области
Xl := min(Zx) = -3
Yh_1 := max(Zy) = 4
# координаты правого нижнего угла области
Xh_1 := max(Zx) = 3
Yl := min(Zy) = -4
# Размеры окна(ширина и высота области отображения в мировых координатах)
ΔXw := Xhw - Xlw = 300
ΔYw := Yhw - Ylw = 300
# Размеры фигуры(ширина и высота области отображения в оконных координатах)
ΔX := Xh_1 - Xl = 6
ΔY := Yh_1 - Yl = 8
Kx := ΔXw/ΔX = 50
Ky := ΔYw/ΔY = 37.5
# Матрица пересчёта
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T := [Kx, 0, Xlw - Kx*Xl; 0, Ky, Yhw + Ky*Yl; 0, 0, 1] = [50, 0, 250; 0, 37.5, 350; 0, 0, 1]
# Перечисление координат в оконные
f := 1
[Xaw; Yaw; f] := T*[Xa; Ya; 1] = [150; 200; 1]
[Xbw; Ybw; f] := T*[Xb; Yb; 1] = [100; 350; 1]
[Xcw; Ycw; f] := T*[Xc; Yc; 1] = [250; 500; 1]
[Xdw; Ydw; f] := T*[Xd; Yd; 1] = [400; 350; 1]
[Xew; Yew; f] := T*[Xe; Ye; 1] = [350; 200; 1]
[Xfw; Yfw; f] := T*[Xf; Yf; 1] = [150; 350; 1]
[Xgw; Ygw; f] := T*[Xh; Yh; 1] = [350; 350; 1]
# Графическое представление
X := [Xb; Xc; Xd; Xb; Xf; Xa; Xe; Xh]
Y := [Yb; Yc; Yd; Yb; Yf; Ya; Ye; Yh]
Xw := [Xbw; Xcw; Xdw; Xbw; Xfw; Xaw; Xew; Xgw]
Yw := [Ybw; Ycw; Ydw; Ybw; Yfw; Yaw; Yew; Ygw]
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# Задание 2
f(x) := sin(π*x)*sqrt(|x|)
x_1 := -6
x_2 := 6
Δx := 0.1
x := -6, -5.9 .. 6
# Координаты левого вернего угла области
Xlw := 100
Ylw := 200
# Координаты правого нижнего угла области
Xhw := 800
Yhw := 900
# Задание значений
i := 0, 1 .. 150
X[i] := x_1 + i*Δx
Y[i] := f(X[i])
Z[i] := 1
# Координаты левого нижнего угла
Xl := -6
Yl := min(Y) = -2.73861
# Координаты правого вержнего угла
Xh := 6
Yh := max(Y) = 2.91548
# Размеры окна(ширина и высота области отображения в мировых координатах)
ΔXw := Xhw - Xlw = 700
ΔYw := Yhw - Ylw = 700
# Размеры фигуры(ширина и высота области отображения в оконных координатах)
ΔX := 12
ΔY := 4.69
Kx := ΔXw/ΔX = 58.3333
Ky := ΔYw/ΔY = 149.254
# Матрица пересчёта
T := [Kx, 0, Xlw - Kx*Xl; 0, Ky, Yhw + Ky*Yl; 0, 0, 1] = [58.3333, 0, 450; 0, 149.254, 491.252; 0, 0, 1]
# С помощью stack() создаём матрицу координат точек графика
V := stack(transpose(X), transpose(Y), transpose(Z))
# Создание матрицы с оконными координатами
Vw := T*V
# Массивы с оконными координатами графика
Xw := transpose(Vw)[:, 0]
Yw := transpose(Vw)[:, 1]
# Графическое представление
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