# Координаты вершин фигуры
Xa := 4
Ya := 2
Xb := 4
Yb := 8
Xc := 6
Yc := 7
Xd := 6
Yd := 3
X := transpose([Xa, Xb, Xc, Xd, Xa])
Y := transpose([Ya, Yb, Yc, Yd, Ya])
# Устанавливаем диапазопы зачений для графика
Cmin := 0
Cmax := 10
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# Находим уравнения графиков функций продолжений сторон трапеций
[a; b] := line([Xd; Xa], [Yd; Ya])
Fda(x) := a + b*x
[a1; b1] := line([Xb; Xc], [Yb; Yc])
Fcb(x) := a1 + b1*x
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# Находим координаты точки пересечения P
x := (a1 - a)/(b - b1) = 10
P := [x; Fcb(x)]
# Смещение начала системы координат
T_s(dx, dy) := [1, 0, -dx; 0, 1, -dy; 0, 0, 1]
# Поворот объекта на угол ϕ = 90
R_o(ϕ) := [cos(ϕ), -sin(ϕ), 0; sin(ϕ), cos(ϕ), 0; 0, 0, 1]
ϕ := -90
ϕ_rad := ϕ*π/180
# Координаты вершин фигуры
Pc := [Xa, Xb, Xc, Xd, Xa; Ya, Yb, Yc, Yd, Ya; 1, 1, 1, 1, 1]
# Смещение системы координат относительно точки пересечения P
P1 := T_s(P[0], P[1])*Pc
X1 := transpose(P1)[:, 0]
Y1 := transpose(P1)[:, 1]
# Устанавливаем новые диапазоны
Cmin2 := -10
Cmax2 := 10
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# Поворачиваем трапецию (объект) на угол 90 град по часовой стрелке
P2 := R_o(ϕ_rad)*P1
X2 := transpose(P2)[:, 0]
Y2 := transpose(P2)[:, 1]
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# Смещаем систему координат в исходное положение
P3 := T_s(-P[0], -P[1])*P2
X3 := transpose(P3)[:, 0]
Y3 := transpose(P3)[:, 1]
# Устанавливаем новые диапазоны
Cmin3 := 0
Cmax3 := 15
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